# OpenSim document version 40000
Model tloModel:
  Ground
  BodySet:
    Body head: mass=1 [kg] mass_center=(0 0 0) inertia=(0 0 0 0 0 0)
    Body l_clavicle: mass=1 mass_center=(0 0 0) inertia=(0 0 0 0 0 0)
    Body l_foot: mass=1 mass_center=(0 0 0) inertia=(0 0 0 0 0 0)
    Body l_hand: mass=1 mass_center=(0 0 0) inertia=(0 0 0 0 0 0)
    Body l_larm: mass=1 mass_center=(0 0 0) inertia=(0 0 0 0 0 0)
    Body l_shank: mass=1 mass_center=(0 0 0) inertia=(0 0 0 0 0 0)
    Body l_thigh: mass=1 mass_center=(0 0 0) inertia=(0 0 0 0 0 0)
    Body l_toes: mass=1 mass_center=(0 0 0) inertia=(0 0 0 0 0 0)
    Body l_uarm: mass=1 mass_center=(0 0 0) inertia=(0 0 0 0 0 0)
    Body r_clavicle: mass=1 mass_center=(0 0 0) inertia=(0 0 0 0 0 0)
    Body r_foot: mass=1 mass_center=(0 0 0) inertia=(0 0 0 0 0 0)
    Body r_hand: mass=1 mass_center=(0 0 0) inertia=(0 0 0 0 0 0)
    Body r_larm: mass=1 mass_center=(0 0 0) inertia=(0 0 0 0 0 0)
    Body r_shank: mass=1 mass_center=(0 0 0) inertia=(0 0 0 0 0 0)
    Body r_thigh: mass=1 mass_center=(0 0 0) inertia=(0 0 0 0 0 0)
    Body r_toes: mass=1 mass_center=(0 0 0) inertia=(0 0 0 0 0 0)
    Body r_uarm: mass=1 mass_center=(0 0 0) inertia=(0 0 0 0 0 0)
    Body pelvis: mass=1 mass_center=(0 0 0) inertia=(0 0 0 0 0 0)
    Body torso: mass=1 mass_center=(0 0 0) inertia=(0 0 0 0 0 0)
  JointSet:
    FreeJoint head-ground: socket_parent_frame=ground_offset socket_child_frame=head_offset
      Coordinate head-ground_coord_0
      Coordinate head-ground_coord_1
      Coordinate head-ground_coord_2
      Coordinate head-ground_coord_3
      Coordinate head-ground_coord_4
      Coordinate head-ground_coord_5
      PhysicalOffsetFrame ground_offset: socket_parent=/ground translation=(0.39813 1.81399 0.30939) [meters]
          orientation=(-1.585559 -0.1216053 -1.61033) [radians]
      PhysicalOffsetFrame head_offset: socket_parent=/bodyset/head translation=(0 0 0)
    BallJoint l_clavicle-torso: socket_parent_frame=torso_offset socket_child_frame=l_clavicle_offset
      Coordinate l_clavicle-torso_coord_0
      Coordinate l_clavicle-torso_coord_1
      Coordinate l_clavicle-torso_coord_2
      PhysicalOffsetFrame torso_offset: socket_parent=/bodyset/torso translation=(0 1.387779e-17 0)
          orientation=(-8.051658e-5 -0.3656625 0.1367685)
      PhysicalOffsetFrame l_clavicle_offset: socket_parent=/bodyset/l_clavicle translation=(0 0 0)
    FreeJoint l_foot-l_shank: socket_parent_frame=l_shank_offset socket_child_frame=l_foot_offset
      Coordinate ankle_dorsiflexion_l
      Coordinate l_foot-l_shank_coord_1
      Coordinate ankle_inversion_l
      Coordinate l_foot-l_shank_coord_3
      Coordinate l_foot-l_shank_coord_4
      Coordinate l_foot-l_shank_coord_5
      PhysicalOffsetFrame l_shank_offset: socket_parent=/bodyset/l_shank translation=(-2.2868e-6 3.5547e-6 -0.4307519)
          orientation=(0.1942291 -0.04688258 0.02451936)
      PhysicalOffsetFrame l_foot_offset: socket_parent=/bodyset/l_foot translation=(0 0 0)
    BallJoint l_hand-l_larm: socket_parent_frame=l_larm_offset socket_child_frame=l_hand_offset
      Coordinate wrist_flex_l
      Coordinate wrist_dev_l
      Coordinate l_hand-l_larm_coord_2
      PhysicalOffsetFrame l_larm_offset: socket_parent=/bodyset/l_larm translation=(-6.2724e-6 -2.3483e-6 -0.2514276)
          orientation=(0.03330506 -0.1090447 -0.0001203065)
      PhysicalOffsetFrame l_hand_offset: socket_parent=/bodyset/l_hand translation=(0 0 0)
    BallJoint l_larm-l_uarm: socket_parent_frame=l_uarm_offset socket_child_frame=l_larm_offset
      Coordinate elbow_flex_l
      Coordinate l_larm-l_uarm_coord_1
      Coordinate pro_sup_l
      PhysicalOffsetFrame l_uarm_offset: socket_parent=/bodyset/l_uarm translation=(1.5144e-6 -1.9393e-6 -0.3060768)
          orientation=(0.8062497 0.0003225905 -1.40187)
      PhysicalOffsetFrame l_larm_offset: socket_parent=/bodyset/l_larm translation=(0 0 0)
    BallJoint l_shank-l_thigh: socket_parent_frame=l_thigh_offset socket_child_frame=l_shank_offset
      Coordinate knee_angle_l
      Coordinate knee_abduction_l
      Coordinate knee_extRotation_l
      PhysicalOffsetFrame l_thigh_offset: socket_parent=/bodyset/l_thigh translation=(2.3332e-6 -5.3754e-6 -0.4308247)
          orientation=(-0.1355724 0.08962417 0.0001650413)
      PhysicalOffsetFrame l_shank_offset: socket_parent=/bodyset/l_shank translation=(0 0 0)
    BallJoint l_thigh-pelvis: socket_parent_frame=pelvis_offset socket_child_frame=l_thigh_offset
      Coordinate hip_flexion_l
      Coordinate hip_adduction_l
      Coordinate hip_rotation_l
      PhysicalOffsetFrame pelvis_offset: socket_parent=/bodyset/pelvis translation=(-0.1147729 7.7424e-6 7.076e-7)
          orientation=(-0.1176385 -0.1578483 0.07502436)
      PhysicalOffsetFrame l_thigh_offset: socket_parent=/bodyset/l_thigh translation=(0 0 0)
    BallJoint l_toes-l_foot: socket_parent_frame=l_foot_offset socket_child_frame=l_toes_offset
      Coordinate mtp_angle_l
      Coordinate l_toes-l_foot_coord_1
      Coordinate l_toes-l_foot_coord_2
      PhysicalOffsetFrame l_foot_offset: socket_parent=/bodyset/l_foot translation=(-2.6101e-6 0.1467413 -0.07191823)
          orientation=(0.1234719 -1.206867e-7 -2.734318e-6)
      PhysicalOffsetFrame l_toes_offset: socket_parent=/bodyset/l_toes translation=(0 0 0)
    FreeJoint l_uarm-l_clavicle: socket_parent_frame=l_clavicle_offset socket_child_frame=l_uarm_offset
      Coordinate arm_flex_l
      Coordinate arm_add_l
      Coordinate arm_rot_l
      Coordinate l_uarm-l_clavicle_coord_3
      Coordinate l_uarm-l_clavicle_coord_4
      Coordinate l_uarm-l_clavicle_coord_5
      PhysicalOffsetFrame l_clavicle_offset: socket_parent=/bodyset/l_clavicle
          translation=(-0.2067934 3.6957e-6 -4.0285e-6) orientation=(0.5303764 0.5151721 -0.9416736)
      PhysicalOffsetFrame l_uarm_offset: socket_parent=/bodyset/l_uarm translation=(0 0 0)
    BallJoint r_clavicle-torso: socket_parent_frame=torso_offset socket_child_frame=r_clavicle_offset
      Coordinate r_clavicle-torso_coord_0
      Coordinate r_clavicle-torso_coord_1
      Coordinate r_clavicle-torso_coord_2
      PhysicalOffsetFrame torso_offset: socket_parent=/bodyset/torso translation=(0 1.387779e-17 0)
          orientation=(-8.817295e-6 0.3941837 -0.1138342)
      PhysicalOffsetFrame r_clavicle_offset: socket_parent=/bodyset/r_clavicle translation=(0 0 0)
    FreeJoint r_foot-r_shank: socket_parent_frame=r_shank_offset socket_child_frame=r_foot_offset
      Coordinate ankle_dorsiflexion_r
      Coordinate r_foot-r_shank_coord_1
      Coordinate ankle_inversion_r
      Coordinate r_foot-r_shank_coord_3
      Coordinate r_foot-r_shank_coord_4
      Coordinate r_foot-r_shank_coord_5
      PhysicalOffsetFrame r_shank_offset: socket_parent=/bodyset/r_shank translation=(1.12314e-5 -1.5774e-6 -0.4308143)
          orientation=(0.07351668 0.1304575 -0.04062779)
      PhysicalOffsetFrame r_foot_offset: socket_parent=/bodyset/r_foot translation=(0 0 0)
    BallJoint r_hand-r_larm: socket_parent_frame=r_larm_offset socket_child_frame=r_hand_offset
      Coordinate wrist_flex_r
      Coordinate wrist_dev_r
      Coordinate r_hand-r_larm_coord_2
      PhysicalOffsetFrame r_larm_offset: socket_parent=/bodyset/r_larm translation=(3.1731e-6 -3.5746e-6 -0.2577549)
          orientation=(0.03305424 0.09522618 -3.956079e-5)
      PhysicalOffsetFrame r_hand_offset: socket_parent=/bodyset/r_hand translation=(0 0 0)
    BallJoint r_larm-r_uarm: socket_parent_frame=r_uarm_offset socket_child_frame=r_larm_offset
      Coordinate elbow_flex_r
      Coordinate r_larm-r_uarm_coord_1
      Coordinate pro_sup_r
      PhysicalOffsetFrame r_uarm_offset: socket_parent=/bodyset/r_uarm translation=(3.2e-8 -4.0638e-6 -0.3072094)
          orientation=(0.5065554 0.0001433433 1.51243)
      PhysicalOffsetFrame r_larm_offset: socket_parent=/bodyset/r_larm translation=(0 0 0)
    BallJoint r_shank-r_thigh: socket_parent_frame=r_thigh_offset socket_child_frame=r_shank_offset
      Coordinate knee_angle_r
      Coordinate knee_abduction_r
      Coordinate knee_intRotation_r
      PhysicalOffsetFrame r_thigh_offset: socket_parent=/bodyset/r_thigh translation=(-6.1058e-6 2.8262e-6 -0.4208413)
          orientation=(0.03714483 -0.03403531 -0.0005485562)
      PhysicalOffsetFrame r_shank_offset: socket_parent=/bodyset/r_shank translation=(0 0 0)
    BallJoint r_thigh-pelvis: socket_parent_frame=pelvis_offset socket_child_frame=r_thigh_offset
      Coordinate hip_flexion_r
      Coordinate hip_adduction_r
      Coordinate hip_rotation_r
      PhysicalOffsetFrame pelvis_offset: socket_parent=/bodyset/pelvis translation=(0.1147838 1.1256e-6 7.223e-7)
          orientation=(0.4712957 -0.008209476 -0.2370293)
      PhysicalOffsetFrame r_thigh_offset: socket_parent=/bodyset/r_thigh translation=(0 0 0)
    BallJoint r_toes-r_foot: socket_parent_frame=r_foot_offset socket_child_frame=r_toes_offset
      Coordinate mtp_angle_r
      Coordinate r_toes-r_foot_coord_1
      Coordinate r_toes-r_foot_coord_2
      PhysicalOffsetFrame r_foot_offset: socket_parent=/bodyset/r_foot translation=(-2.5044e-6 0.1495661 -0.07364482)
          orientation=(0.1160947 1.375117e-6 -1.874345e-6)
      PhysicalOffsetFrame r_toes_offset: socket_parent=/bodyset/r_toes translation=(0 0 0)
    FreeJoint r_uarm-r_clavicle: socket_parent_frame=r_clavicle_offset socket_child_frame=r_uarm_offset
      Coordinate arm_flex_r
      Coordinate arm_add_r
      Coordinate arm_rot_r
      Coordinate r_uarm-r_clavicle_coord_3
      Coordinate r_uarm-r_clavicle_coord_4
      Coordinate r_uarm-r_clavicle_coord_5
      PhysicalOffsetFrame r_clavicle_offset: socket_parent=/bodyset/r_clavicle
          translation=(0.209385 2.6494e-6 -3.9504e-6) orientation=(0.1663409 -0.6485678 0.5352301)
      PhysicalOffsetFrame r_uarm_offset: socket_parent=/bodyset/r_uarm translation=(0 0 0)
    FreeJoint pelvis-ground: socket_parent_frame=ground_offset socket_child_frame=pelvis_offset
      Coordinate pelvis_tilt
      Coordinate pelvis_list
      Coordinate pelvis_rotation
      Coordinate pelvis_tz
      Coordinate pelvis_tx
      Coordinate pelvis_ty
      PhysicalOffsetFrame ground_offset: socket_parent=/ground translation=(0.27089 1.11123 0.31288)
          orientation=(-1.53989 0.1125226 -1.47201)
      PhysicalOffsetFrame pelvis_offset: socket_parent=/bodyset/pelvis translation=(0 0 0)
    FreeJoint torso-ground: socket_parent_frame=ground_offset socket_child_frame=torso_offset
      Coordinate lumbar_extension
      Coordinate lumbar_bending
      Coordinate lumbar_rotation
      Coordinate torso-ground_coord_3
      Coordinate torso-ground_coord_4
      Coordinate torso-ground_coord_5
      PhysicalOffsetFrame ground_offset: socket_parent=/ground translation=(0.36259 1.67711 0.30982)
          orientation=(-1.545203 0.224382 -1.602787)
      PhysicalOffsetFrame torso_offset: socket_parent=/bodyset/torso translation=(0 0 0)
  MarkerSet:
    Marker head_m: head (0 0 0)
    Marker l_clavicle_m: l_clavicle (0 0 0)
    Marker l_foot_m: l_foot (0 0 0)
    Marker l_hand_m: l_hand (0 0 0)
    Marker l_larm_m: l_larm (0 0 0)
    Marker l_shank_m: l_shank (0 0 0)
    Marker l_thigh_m: l_thigh (0 0 0)
    Marker l_toes_m: l_toes (0 0 0)
    Marker l_uarm_m: l_uarm (0 0 0)
    Marker r_clavicle_m: r_clavicle (0 0 0)
    Marker r_foot_m: r_foot (0 0 0)
    Marker r_hand_m: r_hand (0 0 0)
    Marker r_larm_m: r_larm (0 0 0)
    Marker r_shank_m: r_shank (0 0 0)
    Marker r_thigh_m: r_thigh (0 0 0)
    Marker r_toes_m: r_toes (0 0 0)
    Marker r_uarm_m: r_uarm (0 0 0)
    Marker pelvis_m: pelvis (0 0 0)
    Marker torso_m: torso (0 0 0)
